# livestock products model - milk

Dataset: EcoSpold 1, unit process
Functional unit: 1 kg
Category: Agricultural / ECUADOR
Geography: GLO
Generated by: SimaPro
accessRestrictedTo: 0
copyright: false

## Reference product
- livestock products model - milk [GLO]: 1 kg
  milk

## Inputs from technosphere
- dairy cow, at farm {BR} Economic, U [GLO]: 0 kg
  Animals_total_live_weight_kg_per_1kg_product
- tap water {PE}| market for tap water | Cut-off, U [GLO]: 0 kg
  Water_l_per_1kg_product
- electricity, medium voltage {EC}| market for electricity, medium voltage | Cut-off, U [GLO]: 0 kWh
  Electricity_kWh_per_1kg_product
- forages_pastures [GLO]: 0 kg
  Pasture_feed_kg_per_1kg_product + Unmatched_pasture_feed_kg_per_1kg_product
- dairy cow compound feed, at processing {BR} Economic, U [GLO]: 0 kg
  Supplement_feed_kg_per_1kg_product

## Inputs from nature
- Occupation, grassland/pasture/meadow, EC [resource, in ground]: 0 m2a
  Area_ha_per_1kg_product
- Transformation, to grassland/pasture/meadow, EC [resource, in ground]: 0 m2
  Area_ha_per_1kg_product
- Transformation, from grassland/pasture/meadow, EC [resource, in ground]: 0 m2
  Area_ha_per_1kg_product

## Emissions to nature
- Methane [air, low population density]: 0 kg
  kgCH4_livestock_total_per_1kg_product
- Ammonia [air, low population density]: 0 kg
  kgNH3_manure_mgmt_total_per_1kg_product + kgNH3_manure_housing_storage_yard_per_1kg_product + kgNH3_grazing_per_1kg_product
- Nitrogen dioxide [air, low population density]: 0 kg
  kgNOx_manure_mgmt_as_NO2_per_1kg_product
- Dinitrogen monoxide [air, low population density]: 0 kg
  kgN2O_manure_mgmt_total_per_1kg_product

## Sources
- SimaPro, 2026, Dummy, Unspecified
