# Barley_2006_AgrEco1

Dataset: EcoSpold 1, unit process
Functional unit: 2862 kg
Category: Agricultural / ECUADOR
Geography: GLO
Generated by: SimaPro
accessRestrictedTo: 0
copyright: false

## Reference product
- Barley_2006_AgrEco1 [GLO]: 2862 kg
  Model_annual_crops, yield per 1 ha, actual area (ha): 0.0023

## Inputs from technosphere
- packaging film, PP, at plant {RER} U [GLO]: 0.475596 kg
  PP
- kraft paper {RER}| market for kraft paper | Cut-off, U [GLO]: 0.38 kg
  Kraft
- diesel, burned in agricultural machinery {GLO}| diesel, burned in agricultural machinery | Cut-off, U [GLO]: 2475.7 MJ
  Fuel
- ammonium nitrate {RER}| market for ammonium nitrate | Cut-off, U [GLO]: 40 kg
  AN_kgha
- a. Manure, from cattle, stocked in concrete surface or pit [GLO]: 30000 kg
  Cattle, solid
- herbicide, at plant/RER Economic [GLO]: 1 kg
  Herbicide_kgha
- fungicide, at plant/RER Economic [GLO]: 1.5 kg
  Fungicide_kgha
- wheat seed, for sowing {GLO}| market for wheat seed, for sowing | Cut-off, U [GLO]: 190 kg
  Seed, cereal
- transport, tractor and trailer, agricultural {CH}| market for transport, tractor and trailer, agricultural | Cut-off, S - Copied from Ecoinvent U [GLO]: 150 tkm
  Tractor
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
## Inputs from nature
- Occupation, annual crop [resource, unspecified]: 10000 m2a
- Transformation, from annual crop [resource, unspecified]: 10000 m2
- Transformation, to annual crop [resource, unspecified]: 10000 m2
- Water, lake [resource, unspecified]: 0 m3
  Irrig_m3
- Water, river [resource, unspecified]: 0 m3
  Irrig_m3
- Water, well [resource, unspecified]: 0 m3
  Irrig_m3
- Carbon, organic, in soil or biomass stock [resource, in ground]: -351.754 kg
  SOC_mean_rate_kgChayr

## Emissions to nature
- Ammonia [air, unspecified]: 14.9542 kg
  NH3
- Dinitrogen monoxide [air, unspecified]: 2.38811 kg
  N2O
- Nitrogen oxides [air, unspecified]: 12.5214 kg
  NOx
- 2-[4-(2,4-Dichlorophenoxy)phenoxy]propanoic acid [air, unspecified]: 0.015 kg
  c_PrimAir
- 2-Methyl-4-chlorophenoxyacetic acid [air, unspecified]: 0.059 kg
  c_PrimAir
- Chlorothalonil [air, unspecified]: 0.113 kg
  c_PrimAir
- Nitrate [water, unspecified]: 71.7619 kg
  NO3
- Phosphorus [water, unspecified]: 1.75262 kg
  P
- Waste, organic [final-waste-flow, unspecified]: 6587.73 kg
  Straw_kgha
- 2-[4-(2,4-Dichlorophenoxy)phenoxy]propanoic acid [soil, unspecified]: 0.135 kg
  soil_factor
- 2-Methyl-4-chlorophenoxyacetic acid [soil, unspecified]: 0.531 kg
  soil_factor
- Chlorothalonil [soil, unspecified]: 1.017 kg
  soil_factor
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
## Sources
- SimaPro, 2025, Dummy, Unspecified
