# livestock products model - eggs

Dataset: EcoSpold 1, unit process
Functional unit: 1 kg
Category: Agricultural / ECUADOR
Geography: GLO
Generated by: SimaPro
accessRestrictedTo: 0
copyright: false

## Reference product
- livestock products model - eggs [GLO]: 1 kg
  eggs

## Inputs from technosphere
- laying hen <17 weeks, at farm {RER} Economic, U [GLO]: 0 kg
  Animals_total_live_weight_kg_per_1kg_product
- tap water {PE}| market for tap water | Cut-off, U [GLO]: 0 kg
  Water_l_per_1kg_product
- electricity, medium voltage {EC}| market for electricity, medium voltage | Cut-off, U [GLO]: 0 kWh
  Electricity_kWh_per_1kg_product
- laying hen, laying hen feed, conv prod, at farm gate {FR} U [GLO]: 0 kg
  Total_feed_kg_per_1kg_product

## Inputs from nature
- Occupation, artificial areas, EC [resource, in ground]: 0 m2a
  Area_ha_per_1kg_product
- Transformation, to artificial areas, EC [resource, in ground]: 0 m2
  Area_ha_per_1kg_product
- Transformation, from unspecified, EC [resource, in ground]: 0 m2
  Area_ha_per_1kg_product

## Emissions to nature
- Methane [air, low population density]: 0 kg
  kgCH4_livestock_total_per_1kg_product
- Ammonia [air, low population density]: 0 kg
  kgNH3_manure_mgmt_total_per_1kg_product + kgNH3_manure_housing_storage_yard_per_1kg_product + kgNH3_grazing_per_1kg_product
- Nitrogen dioxide [air, low population density]: 0 kg
  kgNOx_manure_mgmt_as_NO2_per_1kg_product
- Dinitrogen monoxide [air, low population density]: 0 kg
  kgN2O_manure_mgmt_total_per_1kg_product

## Sources
- SimaPro, 2026, Dummy, Unspecified
