# livestock products model - meat

Dataset: EcoSpold 1, unit process
Functional unit: 1 kg
Category: Agricultural / ECUADOR
Geography: GLO
Generated by: SimaPro
accessRestrictedTo: 0
copyright: false

## Reference product
- livestock products model - meat [GLO]: 1 kg
  cattle_live, goat_live, meat_poultry, ovine_live, swine_live

## Inputs from technosphere
- forages_pastures [GLO]: 0 kg
  Pasture_feed_kg_per_1kg_product + Unmatched_pasture_feed_kg_per_1kg_product
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
## Inputs from nature
- Occupation, grassland/pasture/meadow, EC [resource, in ground]: 0 m2a
  Area_ha_per_1kg_product
- Transformation, to grassland/pasture/meadow, EC [resource, in ground]: 0 m2
  Area_ha_per_1kg_product
- Transformation, from grassland/pasture/meadow, EC [resource, in ground]: 0 m2
  Area_ha_per_1kg_product

## Emissions to nature
- Methane [air, low population density]: 0 kg
  kgCH4_livestock_total_per_1kg_product
- Ammonia [air, low population density]: 0 kg
  kgNH3_manure_mgmt_total_per_1kg_product + kgNH3_manure_housing_storage_yard_per_1kg_product + kgNH3_grazing_per_1kg_product
- Nitrogen dioxide [air, low population density]: 0 kg
  kgNOx_manure_mgmt_as_NO2_per_1kg_product
- Dinitrogen monoxide [air, low population density]: 0 kg
  kgN2O_manure_mgmt_total_per_1kg_product

## Sources
- SimaPro, 2026, Dummy, Unspecified
