# a. Local production available as food

Dataset: EcoSpold 1, unit process
Functional unit: 9.3725e6 t
Category: Agricultural / ECUADOR
Geography: GLO
Generated by: SimaPro
accessRestrictedTo: 0
copyright: false

## Reference product
- a. Local production available as food [GLO]: 9.3725e6 t
  Production - Export - Feed - Seed - Losses - Other uses

## Inputs from technosphere
- rice, at farm/BR Economic [GLO]: 4.92e8 kg
  proxy for Cereals
- potato {GLO}| market for potato | Cut-off, U [GLO]: 3.41e8 kg
  proxy for Roots and Tubers
- tomato, fresh grade {MX}| tomato production, fresh grade, open field | Cut-off, U [GLO]: 3.3e8 kg
  proxy for Vegetables
- banana {EC}| banana production | Cut-off, U [GLO]: 2.7e8 kg
  proxy for Fruits
- peanut {AR}| peanut production | Cut-off, U [GLO]: 0 kg
- beans, dry, at farm/AR Economic [GLO]: 6e6 kg
  proxy for Pulses
- milk raw, at farm {BR} Economic, U [GLO]: 2.016e9 kg
  proxy for Dairy Products
- chicken meat, at slaughterhouse {BR} Economic, U [GLO]: 4.77e8 kg
  proxy for Poultry Meat
- landed tuna, frozen, EPO {EC}| tuna, capture by purse seiner and landing whole, frozen | Cut-off, U [GLO]: 1.78e8 kg
  proxy for Fisheries
- shrimp or prawn, raw, processed in FR | Chilled | PS | at distribution {FR} U [GLO]: 3.16e8 kg
  proxy for Aquaculture
- conventional egg production, indoor non-cage system, laying hens, at farm {FR} U [GLO]: 1.4e8 kg
  proxy for Eggs
- dairy cow meat, at slaughterhouse {BR} Economic, U [GLO]: 2.385e8 kg
  proxy for Bovine Meat
- pig meat, at slaughterhouse {BR} Economic, U [GLO]: 2.385e8 kg
  proxy for Pigmeat
- refined sunflower oil (solvent), at processing/AR Economic [GLO]: 2.02e8 kg
  proxy for Vegetable Oil and Fat
- palm oil, refined {GLO}| market for palm oil, refined | Cut-off, U [GLO]: 1.901e9 kg
  proxy for Oilcrops
- butter, from cow milk {GLO}| market for butter, from cow milk | Cut-off, U [GLO]: 6.6e7 kg
- fruit soft drink, carbonated (less than 10% of fruit juice), with sugar, processed in FR | Chilled | PET | at distribution {FR} U [GLO]: 1.432e9 kg
  proxy for Non-alcoholic Beverages
- salt {GLO}| market for salt | Cut-off, U [GLO]: 1e6 kg
- beer, regular (4-5 degrees alcohol), at plant {FR} U [GLO]: 6.72e8 kg
  proxy for Alcoholic Beverages
- caen-style tripe, at plant {FR} U [GLO]: 6e7 kg
  proxy for Offals
- bread, French bread (baguette or ball), with yeast, at plant {FR} U [GLO]: 0 kg
  proxy for Miscellaneous

## Sources
- SimaPro, 2026, Dummy, Unspecified
